OpenVSP model (file version 5), 9 components.
Geometry view with OpenVSP parameter names; values to 6 digits, angles in degrees, lengths in the model's unit.
Overall bounding box: X_Min=0 X_Len=19.3724 Y_Min=-6.7 Y_Len=13.4 Z_Min=-0.906967 Z_Len=3.60697

Fuselage "Fuselage"
  location (X Y Z) 0 0 0, rotation 0 0 0
  bounding box size 14.25 2.5 2.33031
  Design: Length=14.25
  cross sections:
    n  XLocPercent  YLocPercent  ZLocPercent  shape
    0  0            0            0            circle Circle_Diameter=0.00025
    1  0.2          0            0.0108696    ellipse Ellipse_Height=1.6 Ellipse_Width=1.82
    2  0.258696     0            0.026        ellipse Ellipse_Height=2.1 Ellipse_Width=2.1
    3  0.5          0            0.0245614    ellipse Ellipse_Height=2.3 Ellipse_Width=2.5
    4  0.75         0            0.0190217    ellipse Ellipse_Height=2.2 Ellipse_Width=2.5
    5  0.87         0            0.00815217   ellipse Ellipse_Height=1.77 Ellipse_Width=2.22
    6  1            0            0            circle Circle_Diameter=0.0618812

Wing "Main Wing"
  location (X Y Z) 3.2 0 -0.3, rotation 0 0 0
  symmetric about XZ
  bounding box size 8.00973 7.6 0.3159
  totals: TotalSpan=7.6 TotalProjectedSpan=7.6 TotalChord=5.18313 TotalArea=39.3918 TotalAR=1.46629
  root: chord 8, twist 0, ellipse Ellipse_Height=0.3159 Ellipse_Width=8
  sections:
    n  Span  Root_Chord  Tip_Chord  Area     Sweep  Sweep_Location  Dihedral  Twist  Twist_Location  tip airfoil
    1  3.8   8           2.36627    19.6959  56     0               0         0      0.25            edit curve Width=2.36627 Height=0.233955 AbsoluteFlag=0 SymType=0 cubic Bezier points (X Y): 0.5 0, 0.506579 -0.3655, 0.503289 -0.456875, 0 -0.5, -0.276142 -0.5, -0.5 -0.276142, -0.5 0, -0.503289 0.395959, -0.276142 0.5, 0 0.5, 0.5 0.456875, 0.503289 0.456875, 0.5 0

Stack "Nozzle"
  location (X Y Z) 14 0 0, rotation 0 -5 0
  bounding box size 1.36354 1.28523 1.26779
  cross sections:
    n  XDelta    YDelta  ZDelta  shape
    0  0         0       0       circle Circle_Diameter=0.1
    1  0.344262  0       0       circle Circle_Diameter=0.5
    2  0.836066  0       0       circle Circle_Diameter=1.25
    3  0.1       0       0       circle Circle_Diameter=0.5

Hinge "Hinge"
  location (X Y Z) 11 0 -0.3, rotation 0 0 0
  Hinge: JointRotMax=0 JointRotMaxFlag=1 JointRotMin=-60 JointRotMinFlag=1 JointRotate=0 JointRotateFlag=1 JointTransMax=1000 JointTransMaxFlag=0 JointTransMin=-1000 JointTransMinFlag=0 JointTranslate=0 JointTranslateFlag=0 OrientRotFlag=0 PrimOffAbsRelFlag=1 PrimType=0 PrimULoc=0 PrimVecAbsRelFlag=1 PrimWLoc=0 PrimXOff=0 PrimXOffRel=0 PrimXVec=0 PrimXVecRel=0 PrimYOff=0 PrimYOffRel=0 PrimYVec=1 PrimYVecRel=1 PrimZOff=0 PrimZOffRel=0 PrimZVec=0 PrimZVecRel=0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

Wing "Main WIng Pt 2", child of "Hinge"
  location (X Y Z) 11 0 -0.3, rotation 0 0 0; relative location 0 0 0, rotation 0 0 0
  symmetric about XZ
  bounding box size 1.9 8 0.19011
  totals: TotalSpan=8 TotalProjectedSpan=8 TotalChord=1.825 TotalArea=14.6 TotalAR=4.38356
  root: chord 1.75, twist 0, NACA 4-series Camber=0 CamberLoc=0.2 ThickChord=0.1
  sections:
    n  Span  Root_Chord  Tip_Chord  Area  Sweep  Sweep_Location  Dihedral  Twist  Twist_Location  tip airfoil
    1  4     1.75        1.9        7.3   0      0               0         0      0.25            as above

Wing "V-Stab", child of "Hinge"
  location (X Y Z) 11.2806 3.9 0, rotation 90 2 0; relative location 0.280571 3.9 0.3, rotation 90 2 0
  symmetric about XZ
  bounding box size 8.09188 8.46599 2.7
  totals: TotalSpan=5.4 TotalProjectedSpan=5.4 TotalChord=3.9 TotalArea=21.06 TotalAR=1.38462
  root: chord 6.8, twist 0, NACA 4-series Camber=0 CamberLoc=0.2 ThickChord=0.05
  sections:
    n  Span  Root_Chord  Tip_Chord  Area   Sweep    Sweep_Location  Dihedral  Twist  Twist_Location  tip airfoil
    1  2.7   6.8         1          10.53  69.1705  0               0         0      0.25            NACA 4-series Camber=0 CamberLoc=0.2 ThickChord=0.1

Stack "Booms", child of "Hinge"
  location (X Y Z) 8.15 3.78 -0.4, rotation 0 0 1.6; relative location -2.85 3.78 -0.1, rotation 0 0 1.6
  symmetric about XZ
  bounding box size 10.0033 8.45772 1.21408
  cross sections:
    n  XDelta   YDelta  ZDelta      shape
    0  0        0       0           circle Circle_Diameter=0.005
    1  1        0       -0.0819672  ellipse Ellipse_Height=0.85 Ellipse_Width=0.35
    2  3        0       0.1         ellipse Ellipse_Height=1 Ellipse_Width=0.35
    3  5.55082  0       0.491803    ellipse Ellipse_Height=0.394545 Ellipse_Width=0.35
    4  0.45     0       -0.0819672  circle Circle_Diameter=0.05

Wing "H-Stab OB", child of "Hinge"
  location (X Y Z) 15 4.1 0.85, rotation 0 0 0; relative location 4 4.1 1.15, rotation 0 0 0
  symmetric about XZ
  bounding box size 3.39856 13.4 0.166439
  totals: TotalSpan=5.2 TotalProjectedSpan=5.2 TotalChord=1.65 TotalArea=8.58 TotalAR=3.15152
  root: chord 3, twist 0, NACA 4-series Camber=0 CamberLoc=0.2 ThickChord=0.05
  sections:
    n  Span  Root_Chord  Tip_Chord  Area  Sweep  Sweep_Location  Dihedral  Twist  Twist_Location  tip airfoil
    1  2.6   3           0.3        4.29  50     0               0         0      0.25            NACA 4-series Camber=0 CamberLoc=0.2 ThickChord=0.1

Wing "H-Stab IB", child of "Hinge"
  location (X Y Z) 16 -4.1 1.25, rotation 0 0 0; relative location 5 -4.1 1.55, rotation 0 0 0
  symmetric about XZ
  bounding box size 2.25 8.2 0.133652
  totals: TotalSpan=1.575 TotalProjectedSpan=1.575 TotalChord=1.275 TotalArea=2.00813 TotalAR=1.2353
  root: chord 2.25, twist 0, NACA 4-series Camber=0 CamberLoc=0.2 ThickChord=0.05
  sections:
    n  Span      Root_Chord  Tip_Chord  Area     Sweep    Sweep_Location  Dihedral  Twist  Twist_Location  tip airfoil
    1  0.787501  2.25        0.3        1.00406  67.5909  0               0         0      0.25            NACA 4-series Camber=0 CamberLoc=0.2 ThickChord=0.1
